image := READBMP("C:\Users\Jojo\Documents\Study\Volosatova 2\LR1\lena.bmp")
r := 15  # Осуществляем чтение из файла. Задаем параметр фильтрации r=15
# [component: inputs image]
# Импульсный отклик фильтра
H(x, y) := exp(-(x^4 + y^4)/r^4)
n := 0 .. rows(image) - 1  # Задаем функцию для фильтра, переводим ее в дискертную форму ( по размеру матрицы изображения)
m := 0 .. cols(image) - 1
h[n, m] := H(n, m)
CH := CFFT(h)  # Дискретное преобразование Фурье к полученной функции
Cim := CFFT(image)  # Дискретное преобразование Фурье к исходной матрице.
CF[n, m] := (CH[n, m]*Cim[n, m])  # Осуществляем перемножение элементов полученной матрицы на элементы исходной.
F := ICFFT(CF)  # Обратное преобразование Фурье для полученной матрицы
# Приводим полученные данные  в форму вещественных целых чисел, лежащий в пределах от 0 до 255.
F_new := F*255/max(F)
# Берем вещественную часть
res[n, m] := Re(F_new[n, m])
# Получим конечный результат
# [component: inputs res]
output := WRITEBMP("result.bmp", res)
